<Lems>

<ComponentType name="DisplayList">
    <Parameter name="timeScale" dimension="time"/>
    <Children name="lines" type="Line"/>

    <Text name="title"/>
    <Text name="display"/>
</ComponentType>

<ComponentType name="Display">
    <Text name="title"/>
	<Parameter name="xmin" dimension="none"/>
	<Parameter name="xmax" dimension="none"/>
	<Parameter name="ymin" dimension="none"/>
	<Parameter name="ymax" dimension="none"/>

    <Simulation>
         <DataDisplay title="title" dataRegion="xmin,xmax,ymin,ymax"/>
    </Simulation>
</ComponentType>

<ComponentType name="Line">
    <Parameter name="scale" dimension="*"/>
	 <Parameter name="timeScale" dimension="*"/>
    <Text name="color"/>
    <Text name="save"/>
    <Path name="quantity"/>
    <Simulation>
        <Record quantity="quantity" timeScale="timeScale" scale="scale" color="color" destination="display"/>
    </Simulation>
</ComponentType>

<ComponentType name="Simulation">
    <Parameter name="length" dimension="time"/>
    <Parameter name="step" dimension="time"/>
    <ComponentReference name="target" type="Component"/>
    <ComponentReference name="display" type="Display" local="true"/>
    <Children name="outputs" type="DisplayList"/>
    <Dynamics>
        <StateVariable name="t" dimension="time"/>
    </Dynamics>

    <Simulation>
        <Run component="target" variable="t" increment="step" total="length"/>
    </Simulation>
</ComponentType>

<ComponentType name="SimulationSet">
    <Children name="simulations" type="Simulation"/>
    <Children name="displays" type="Display"/>

</ComponentType>

</Lems>
